<?xml version="1.0" encoding="UTF-8"?>
<channelml xmlns="http://morphml.org/channelml/schema" xmlns:xsi="http://www.w3.org/2001/XMLSchema-instance" xmlns:meta="http://morphml.org/metadata/schema" xsi:schemaLocation="http://morphml.org/channelml/schema  ../../Schemata/v1.3beta/Level2/ChannelML_v1.3.xsd" units="Physiological Units">

    <meta:notes>ChannelML file describing a synaptic mechanism</meta:notes>

    <synapse_type name="MFSpikeSyn">

        <status value="stable">
            <meta:contributor>
                <meta:name>Padraig Gleeson</meta:name>
            </meta:contributor>
        </status>

        <meta:notes>Fast spiking synapse, used for input to Mossy Fibers</meta:notes>

        <doub_exp_syn max_conductance="1.0E-4" rise_time=".24" decay_time=".26" reversal_potential="40"/>

    </synapse_type>

</channelml>
