<?xml version="1.0" encoding="UTF-8"?>
<networkml xmlns="http://morphml.org/networkml/schema" xmlns:meta="http://morphml.org/metadata/schema" xmlns:xsi="http://www.w3.org/2001/XMLSchema-instance" xsi:schemaLocation="http://morphml.org/networkml/schema  http://www.neuroml.org/NeuroMLValidator/NeuroMLFiles/Schemata/v1.8.1/Level3/NetworkML_v1.8.1.xsd" lengthUnits="micrometer">

    <meta:notes>

Network structure (NeuroML 1.x) for project: GranuleCell saved with neuroConstruct v1.7.1 on: 16:11:39, 17-Jul-14

Cell Group: Gran contains 1 cells

    </meta:notes>

<meta:properties>
    <meta:property tag="neuroConstruct_random_seed" value="1234"/>

    <meta:property tag="neuroConstruct_sim_config" value="Default Simulation Configuration"/>

    <meta:property tag="neuroConstruct_sim_duration" value="700.0"/>

    <meta:property tag="neuroConstruct_sim_time_step" value="0.01"/>

    <meta:property tag="neuroConstruct_temperature" value="32.0"/>
</meta:properties>

        <populations>
    <population name="Gran" cell_type="Granule_98">
        <meta:properties>
        </meta:properties>
        <instances size="1">
            <instance id="0">
                <location x="64.65821" y="50.0" z="0.0"/>
            </instance>
        </instances>
    </population>
</populations>

            <!--There are no synaptic connections present in the network-->

        <inputs units="Physiological Units">
    <input name="Gran_10pA">
        <pulse_input delay="100.0" duration="500.0" amplitude="1.0E-5"/>
        <target population="Gran">
            <sites size="1">
            <site cell_id="0" segment_id="0" fraction_along="0.5"/>
        </sites>
        </target>
    </input>
</inputs>

</networkml>
