<?xml version="1.0" encoding="iso-8859-1"?>
<neuroml xmlns="http://www.neuroml.org/schema/neuroml2" xmlns:xsi="http://www.w3.org/2001/XMLSchema-instance" xsi:schemaLocation="http://www.neuroml.org/schema/neuroml2 http://neuroml.svn.sourceforge.net/viewvc/neuroml/NeuroML2/Schemas/NeuroML2/NeuroML_v2alpha.xsd" id="GranPassiveCond">

    <notes>ChannelML file containing a single Channel description</notes>

    <ionChannel id="GranPassiveCond" conductance="10pS" type="ionChannelPassive">

        <notes>Simple leak conductance for Granule cell</notes>

    </ionChannel>

</neuroml>
