<?xml version="1.0" encoding="iso-8859-1"?>
<neuroml xmlns="http://www.neuroml.org/schema/neuroml2" xmlns:xsi="http://www.w3.org/2001/XMLSchema-instance" xsi:schemaLocation="http://www.neuroml.org/schema/neuroml2 http://neuroml.svn.sourceforge.net/viewvc/neuroml/NeuroML2/Schemas/NeuroML2/NeuroML_v2alpha.xsd" id="">

    <notes>A channel from Maex, R and De Schutter, E. Synchronization of Golgi and Granule Cell Firing in a
	Detailed Network Model of the Cerebellar Granule Cell Layer</notes>

    <decayingPoolConcentrationModel id="Gran_CaPool_98" restingConc="7.55e-5mM" decayConstant="1e-2s" shellThickness="8.4e-8m" ion="ca"/>

</neuroml>
