<?xml version="1.0" encoding="iso-8859-1"?>
<neuroml xmlns="http://www.neuroml.org/schema/neuroml2" xmlns:xsi="http://www.w3.org/2001/XMLSchema-instance" xsi:schemaLocation="http://www.neuroml.org/schema/neuroml2 http://neuroml.svn.sourceforge.net/viewvc/neuroml/NeuroML2/Schemas/NeuroML2/NeuroML_v2alpha.xsd" id="Gran_KCa_98">

    <notes>A channel from Maex, R and De Schutter, E. Synchronization of Golgi and Granule Cell Firing in a
    Detailed Network Model of the Cerebellar Granule Cell Layer</notes>

    <ionChannel id="Gran_KCa_98" conductance="10pS" type="ionChannelHH" species="k">

        <notes>Calcium dependent K+ channel</notes>

        <gate id="m" type="gateHH" instances="1">
            <q10Settings type="q10ExpTemp" q10Factor="3" experimentalTemp="17.350264793 degC"/>
            <notes>Note: offset from ChannelML file incorporated into midpoint of rates!!</notes>
            <forwardRate type="Gran_KCa_98_m_alpha_rate"/>
            <reverseRate type="Gran_KCa_98_m_beta_rate"/>
        </gate>

    </ionChannel>

    <ComponentType name="Gran_KCa_98_m_alpha_rate" extends="baseVoltageConcDepRate">
        <Constant name="TIME_SCALE" dimension="time" value="1 s"/>
        <Constant name="VOLT_SCALE" dimension="voltage" value="1 V"/>
        <Constant name="CONC_SCALE" dimension="concentration" value="1 mM"/>
        <Constant name="offset" dimension="voltage" value="0.010V"/>

        <Behavior>
            <DerivedVariable name="V" dimension="none" value="(v - offset) / VOLT_SCALE"/>
            <DerivedVariable name="ca_conc" dimension="none" value="caConc / CONC_SCALE"/>
            <DerivedVariable name="r" exposure="r" dimension="per_time" value="(2500/(1 + ( (1.5e-3 *(exp (-85*V))) / ca_conc))) / TIME_SCALE"/>
        </Behavior>

    </ComponentType>

    <ComponentType name="Gran_KCa_98_m_beta_rate" extends="baseVoltageConcDepRate">
        <Constant name="TIME_SCALE" dimension="time" value="1 s"/>
        <Constant name="VOLT_SCALE" dimension="voltage" value="1 V"/>
        <Constant name="CONC_SCALE" dimension="concentration" value="1 mM"/>
        <Constant name="offset" dimension="voltage" value="0.010V"/>

        <Behavior>
            <DerivedVariable name="V" dimension="none" value="(v - offset) / VOLT_SCALE"/>
            <DerivedVariable name="ca_conc" dimension="none" value="caConc / CONC_SCALE"/>
            <DerivedVariable name="r" exposure="r" dimension="per_time" value="(1500/(1 + (ca_conc / (1.5e-4 * (exp (-77*V)))))) / TIME_SCALE"/>
        </Behavior>

    </ComponentType>

</neuroml>
